*Heading
** Job name: Nacre_model Model name: Nacre_model
** Generated by: Abaqus/CAE 2021
*Preprint, echo=NO, model=NO, history=NO, contact=NO
**
** PARTS
**
*Part, name=PART-1
*Node
      1,   7.06327963,  0.696100354
      2,   7.53653145,  0.248800248
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*Element, type=CPS4R
  1, 3408, 3394, 1263, 3406
  2, 3394, 3395, 1264, 1263
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*Element, type=CPS3
580, 1606, 1609, 1610
581, 1605, 1608, 1612
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*Element, type=COH2D4
3326, 3379, 3387,    4,  634
3327, 3380, 3379,  634,  635
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*Nset, nset=PART-1-REFPT_, internal
 4710,
*Nset, nset=RP
 4710,
*Nset, nset=TABLET, generate
    1,  4709,     1
*Elset, elset=TABLET, generate
    1,  3325,     1
*Nset, nset=INTERFACE
    1,    2,    3,    4,    5,    6
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*Elset, elset=INTERFACE
  288,  321,  472,  943, 1023, 1313
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*Elset, elset=COHESIVESEAM-1-ELEMENTS, generate
 3326,  4513,     1
*Nset, nset=COHESIVESEAM-1-TOPNODES
    1,    2,    3,    4,    5,    8
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*Nset, nset=COHESIVESEAM-1-BOTTOMNODES
    4,    6,    7,    9,   10,   12
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*Elset, elset=__PICKEDSURF9_S3, internal
  288, 2055, 2283, 3326, 3327, 3328
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*Elset, elset=__PICKEDSURF9_S2, internal
 1566, 1676
*Elset, elset=__PICKEDSURF9_S1, internal
  472, 1313, 1751, 2586, 3263
*Elset, elset=__PICKEDSURF9_S4, internal
 3213,
*Elset, elset=_COHESIVESEAM-1-TOPSURF_S3, internal, generate
 3326,  4513,     1
*Elset, elset=_COHESIVESEAM-1-BOTTOMSURF_S1, internal, generate
 3326,  4513,     1
*Elset, elset=_I1, internal
    1,    2,    3,    4,    5,    6
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*Elset, elset=_I2, internal
  580,  581,  596,  621,  651,  671
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*Elset, elset=__PICKEDSURF9_S3_196, internal
  288, 2055, 2283, 3326, 3327, 3328
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*Elset, elset=__PICKEDSURF9_S2_196, internal
 1566, 1676
*Elset, elset=__PICKEDSURF9_S4_196, internal
 3213,
*Elset, elset=__PICKEDSURF9_S1_196, internal
  472, 1313, 1751, 2586, 3263
*Surface, type=ELEMENT, name=_PICKEDSURF9, internal
__PICKEDSURF9_S3_196, S3
__PICKEDSURF9_S2_196, S2
__PICKEDSURF9_S4_196, S4
__PICKEDSURF9_S1_196, S1
*Surface, type=ELEMENT, name=COHESIVESEAM-1-TOPSURF
_COHESIVESEAM-1-TOPSURF_S3, S3
*Surface, type=ELEMENT, name=COHESIVESEAM-1-BOTTOMSURF
_COHESIVESEAM-1-BOTTOMSURF_S1, S1
** Section: Section-1-_I1
*Solid Section, elset=_I1, controls=EC-1, material=ELASTIC
,
** Section: Section-2-_I2
*Solid Section, elset=_I2, material=ELASTIC
,
** Section: Section-3-COHESIVESEAM-1-ELEMENTS
*Cohesive Section, elset=COHESIVESEAM-1-ELEMENTS, controls=EC-2, material=COHESIVE, response=TRACTION SEPARATION, thickness=SPECIFIED
0.025, 1.
*End Part
**
**
** ASSEMBLY
**
*Assembly, name=Assembly
**
*Instance, name=PART-1-1, part=PART-1
*End Instance
**
*Node
      1,   4.37056255,           0.
*Nset, nset=RP
 1,
*Elset, elset=_S_SURF-1_S1, internal, instance=PART-1-1
  357,  358, 1504, 2188, 2497, 2500, 2504
*Elset, elset=_S_SURF-1_S1_1, internal, instance=PART-1-1
  357,  358, 1504, 2188, 2497, 2500, 2504
*Elset, elset=_S_SURF-1_S1_2, internal, instance=PART-1-1
  357,  358, 1504, 2188, 2497, 2500, 2504
*Elset, elset=_S_SURF-1_S1_3, internal, instance=PART-1-1
  357,  358, 1504, 2188, 2497, 2500, 2504
*Elset, elset=_S_SURF-1_S1_4, internal, instance=PART-1-1
  357,  358, 1504, 2188, 2497, 2500, 2504
*Elset, elset=_S_SURF-1_S1_5, internal, instance=PART-1-1
  357,  358, 1504, 2188, 2497, 2500, 2504
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*Elset, elset=_S_SURF-1_S2_196, internal, instance=PART-1-1
  198,  203,  208,  213,  218,  401
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*Elset, elset=_S_SURF-1_S4_196, internal, instance=PART-1-1
  562,  565,  568,  571,  574,  577, 1128, 1129, 1136, 1508, 1518, 1521, 2197, 3071, 3090
*Elset, elset=_S_SURF-1_S1_196, internal, instance=PART-1-1
  357,  358, 1504, 2188, 2497, 2500, 2504
*Elset, elset=_S_SURF-1_S3_196, internal, instance=PART-1-1
  540,  541,  542,  543, 2186, 2498
*Surface, type=ELEMENT, name=S_SURF-1
_S_SURF-1_S2_196, S2
_S_SURF-1_S4_196, S4
_S_SURF-1_S1_196, S1
_S_SURF-1_S3_196, S3
*Elset, elset=_S_SURF-2_S1_196, internal, instance=PART-1-1
  154,  155,  156,  157,  158,  600
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*Elset, elset=_S_SURF-2_S3_196, internal, instance=PART-1-1
  602,  606,  611,  869, 1080, 1087, 1089, 1424, 1437, 1483
*Elset, elset=_S_SURF-2_S4_196, internal, instance=PART-1-1
   21,   25,   29,   33,   37,   41
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*Elset, elset=_S_SURF-2_S2_196, internal, instance=PART-1-1
  676,  679,  680,  867,  879, 1098, 1106, 1477
*Surface, type=ELEMENT, name=S_SURF-2
_S_SURF-2_S1_196, S1
_S_SURF-2_S3_196, S3
_S_SURF-2_S4_196, S4
_S_SURF-2_S2_196, S2
** Constraint: COUPLING
*Coupling, constraint name=COUPLING, ref node=PART-1-1.RP, surface=S_SURF-1
*Kinematic
** Constraint: COUPLING2
*Coupling, constraint name=COUPLING2, ref node=RP, surface=S_SURF-2
*Kinematic
*End Assembly
**
** ELEMENT CONTROLS
**
*Section Controls, name=EC-1, ELEMENT DELETION=NO, hourglass=STIFFNESS
1., 1., 1.
*Section Controls, name=EC-2, MAX DEGRADATION=0.99, hourglass=STIFFNESS, VISCOSITY=0.001
1., 1., 1.
**
** MATERIALS
**
*Material, name=COHESIVE
*Damage Initiation, criterion=MAXS
 0.00019938, 0.00029504, 0.00019938
*Damage Evolution, type=DISPLACEMENT
 0.0739834,
*Elastic, type=TRACTION
 0.00330681, 0.00027319, 0.00027319
*Material, name=ELASTIC
*Elastic
 0.1, 0.28
** ----------------------------------------------------------------
**
** STEP: Step-1
**
*Step, name=Step-1, nlgeom=YES, inc=100000
*Static
0.001, 1., 1e-15, 0.05
**
** BOUNDARY CONDITIONS
**
** Name: Disp-BC-1 Type: Displacement/Rotation
*Boundary
PART-1-1.RP, 1, 1
** Name: Disp-BC-2 Type: Displacement/Rotation
*Boundary
PART-1-1.RP, 2, 2, 0.25
** Name: Disp-BC-3 Type: Displacement/Rotation
*Boundary
PART-1-1.RP, 6, 6
** Name: Disp-BC-4 Type: Symmetry/Antisymmetry/Encastre
*Boundary
RP, ENCASTRE
**
** OUTPUT REQUESTS
**
*Restart, write, frequency=0
**
** FIELD OUTPUT: F-Output-1
**
*Output, field
*Contact Output
CDISP, CSTRESS
**
** FIELD OUTPUT: F-Output-2
**
*Node Output
CF, RF, U
**
** FIELD OUTPUT: F-Output-3
**
*Element Output, directions=YES
ENER, LE, PE, PEEQ, PEMAG, S, SDEG
**
** HISTORY OUTPUT: H-Output-1
**
*Output, history
*Node Output, nset=PART-1-1.RP
RF2, U2
**
** HISTORY OUTPUT: H-Output-2
**
*Node Output, nset=RP
RF2, U2
*End Step
